Tue Sep  3 10:05:58 CEST 2019
$PROBLEM    WARFARIN PKPD
$DATA      warfarin-sim IGNORE=@
$INPUT      ID WT AGE SEX TIME AMT RATX DVID DV MDV EVID
$THETA  (0.01,0.134,1) ; POPCL L/h/70kg
 (0.01,8.09,20) ; POPV L/70kg
 (0.01,0.6,24) ; POPKA h
 (0.01,96.5,200) ; POPE0
 (-1000000,-74.3,0) ; POPEMAX
 (0.01,0.219,100) ; POPC50
$OMEGA  0.09  ;      PPVCL
 0.09  ;       PPVV
 0.9  ;      PPVKA
 0.001  ;      PPVE0
 0.01  ;    PPVEMAX
 0.5  ;     PPVC50
$SIGMA  0.00697  ;      RUVCV
$SIGMA  0.0824  ; RUVSD mg/L
$SIGMA  30  ;      RUVFX
$SUBROUTINE ADVAN2 TRAN2
$PK

   FSZV=WT/70
   FSZCL=FSZV**0.75

   CL=FSZCL*THETA(1)*EXP(ETA(1))
   V=FSZV*THETA(2)*EXP(ETA(2))
    KA=THETA(3)*EXP(ETA(3))

   S2=V

   E0=THETA(4)*EXP(ETA(4))
   EMAX=THETA(5)*EXP(ETA(5))
   C50=(1-SEX*0.5)*THETA(6)*EXP(ETA(6))

$ERROR

   CP=F
   PCA=E0 + EMAX*CP/(C50+CP)
   IF (DVID.LE.1) THEN
    IPRED = CP
      Y=CP*(1+ERR(1)) + ERR(2)
   ENDIF
   IF (DVID.EQ.2) THEN
   IPRED = PCA
      Y=PCA + ERR(3)
   ENDIF

D_EPSETA1_1 = 0
D_EPSETA1_2 = 0
D_EPSETA1_3 = 0
D_EPSETA1_4 = 0
D_EPSETA1_5 = 0
D_EPSETA1_6 = 0
D_EPSETA2_1 = 0
D_EPSETA2_2 = 0
D_EPSETA2_3 = 0
D_EPSETA2_4 = 0
D_EPSETA2_5 = 0
D_EPSETA2_6 = 0
D_EPSETA3_1 = 0
D_EPSETA3_2 = 0
D_EPSETA3_3 = 0
D_EPSETA3_4 = 0
D_EPSETA3_5 = 0
D_EPSETA3_6 = 0
"LAST
"D_EPSETA1_1=HH(1,2)
"D_EPSETA1_2=HH(1,3)
"D_EPSETA1_3=HH(1,4)
"D_EPSETA1_4=HH(1,5)
"D_EPSETA1_5=HH(1,6)
"D_EPSETA1_6=HH(1,7)
"D_EPSETA2_1=HH(2,2)
"D_EPSETA2_2=HH(2,3)
"D_EPSETA2_3=HH(2,4)
"D_EPSETA2_4=HH(2,5)
"D_EPSETA2_5=HH(2,6)
"D_EPSETA2_6=HH(2,7)
"D_EPSETA3_1=HH(3,2)
"D_EPSETA3_2=HH(3,3)
"D_EPSETA3_3=HH(3,4)
"D_EPSETA3_4=HH(3,5)
"D_EPSETA3_5=HH(3,6)
"D_EPSETA3_6=HH(3,7)
$ESTIMATION METHOD=COND INTERACTION PRINT=1 NOABORT MAX=0
$TABLE      ID TIME WT AGE SEX AMT RATX DVID DV MDV EVID NOAPPEND
            ONEHEADER NOPRINT FILE=sdtab4.mod
;; ETAS and covariates are added in the table manually (derivatives_run4.tab)
$TABLE      ID TIME WT AGE SEX AMT RATX DVID DV MDV EVID ETA1 ETA2
            ETA3 ETA4 ETA5 ETA6 H011 H021 H031 G011 G021 G031 G041
            G051 G061 D_EPSETA1_1 D_EPSETA1_2 D_EPSETA1_3 D_EPSETA1_4
            D_EPSETA1_5 D_EPSETA1_6 D_EPSETA2_1 D_EPSETA2_2
            D_EPSETA2_3 D_EPSETA2_4 D_EPSETA2_5 D_EPSETA2_6
            D_EPSETA3_1 D_EPSETA3_2 D_EPSETA3_3 D_EPSETA3_4
            D_EPSETA3_5 D_EPSETA3_6 NOPRINT NOAPPEND ONEHEADER
            FILE=derivatives_run4.tab FORMAT=s1PE15.8

NM-TRAN MESSAGES
 WARNINGS AND ERRORS (IF ANY) FOR PROBLEM    1
 (WARNING  2) NM-TRAN INFERS THAT THE DATA ARE POPULATION.
 (WARNING  3) THERE MAY BE AN ERROR IN THE ABBREVIATED CODE. THE FOLLOWING
 ONE OR MORE RANDOM VARIABLES ARE DEFINED WITH "IF" STATEMENTS THAT DO NOT
 PROVIDE DEFINITIONS FOR BOTH THE "THEN" AND "ELSE" CASES. IF ALL
 CONDITIONS FAIL, THE VALUES OF THESE VARIABLES WILL BE ZERO.
   IPRED Y

1NONLINEAR MIXED EFFECTS MODEL PROGRAM (NONMEM) VERSION 7.4.3
 ORIGINALLY DEVELOPED BY STUART BEAL, LEWIS SHEINER, AND ALISON BOECKMANN
 CURRENT DEVELOPERS ARE ROBERT BAUER, ICON DEVELOPMENT SOLUTIONS,
 AND ALISON BOECKMANN. IMPLEMENTATION, EFFICIENCY, AND STANDARDIZATION
 PERFORMED BY NOUS INFOSYSTEMS.
 PROBLEM NO.:         1
 WARFARIN PKPD
 TOT. NO. OF OBS RECS:     1449
 TOT. NO. OF INDIVIDUALS:       96
 ONE COMPARTMENT MODEL WITH FIRST-ORDER ABSORPTION (ADVAN2)
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 #TBLN:      1
 #METH: First Order Conditional Estimation with Interaction (Evaluation)
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 Elapsed evaluation time in seconds:     0.07
 Elapsed postprocess time in seconds:     0.09

 ********************         FIRST ORDER CONDITIONAL ESTIMATION WITH INTERACTION (EVALUATION)       ********************
 #OBJT:**************                       MINIMUM VALUE OF OBJECTIVE FUNCTION                      ********************
 #OBJV:********************************************     3979.396       **************************************************

 ********************         FIRST ORDER CONDITIONAL ESTIMATION WITH INTERACTION (EVALUATION)       ********************
 ********************                             FINAL PARAMETER ESTIMATE                           ********************

 THETA - VECTOR OF FIXED EFFECTS PARAMETERS   *********
         TH 1      TH 2      TH 3      TH 4      TH 5      TH 6
         1.34E-01  8.09E+00  6.00E-01  9.65E+01 -7.43E+01  2.19E-01

 OMEGA - COV MATRIX FOR RANDOM EFFECTS - ETAS  ********
         ETA1      ETA2      ETA3      ETA4      ETA5      ETA6
 ETA1
+        9.00E-02
 ETA2
+        0.00E+00  9.00E-02
 ETA3
+        0.00E+00  0.00E+00  9.00E-01
 ETA4
+        0.00E+00  0.00E+00  0.00E+00  1.00E-03
 ETA5
+        0.00E+00  0.00E+00  0.00E+00  0.00E+00  1.00E-02
 ETA6
+        0.00E+00  0.00E+00  0.00E+00  0.00E+00  0.00E+00  5.00E-01

 SIGMA - COV MATRIX FOR RANDOM EFFECTS - EPSILONS  ****
         EPS1      EPS2      EPS3
 EPS1
+        6.97E-03
 EPS2
+        0.00E+00  8.24E-02
 EPS3
+        0.00E+00  0.00E+00  3.00E+01

 OMEGA - CORR MATRIX FOR RANDOM EFFECTS - ETAS  *******
         ETA1      ETA2      ETA3      ETA4      ETA5      ETA6
 ETA1
+        3.00E-01
 ETA2
+        0.00E+00  3.00E-01
 ETA3
+        0.00E+00  0.00E+00  9.49E-01
 ETA4
+        0.00E+00  0.00E+00  0.00E+00  3.16E-02
 ETA5
+        0.00E+00  0.00E+00  0.00E+00  0.00E+00  1.00E-01
 ETA6
+        0.00E+00  0.00E+00  0.00E+00  0.00E+00  0.00E+00  7.07E-01

 SIGMA - CORR MATRIX FOR RANDOM EFFECTS - EPSILONS  ***
         EPS1      EPS2      EPS3
 EPS1
+        8.35E-02
 EPS2
+        0.00E+00  2.87E-01
 EPS3
+        0.00E+00  0.00E+00  5.48E+00
 Elapsed finaloutput time in seconds:     0.18
 #CPUT: Total CPU Time in Seconds,        0.368
