mån 16 sep 2019 09:38:58 CEST
;; 1. Based on: 5
$PROBLEM    PHENOBARB SIMPLE MODEL
$INPUT      ID DV MDV OPRED D_EPS1 TIME AMT WGT APGR D_ETA1 D_ETA2
            OETA1 OETA2 D_EPSETA1_1 D_EPSETA1_2 FREMTYPE
$DATA      ../../frem_dataset.dta IGNORE=@
$PRED BASE1=D_ETA1*(ETA(1)-OETA1)
BASE2=D_ETA2*(ETA(2)-OETA2)
BSUM1=BASE1+BASE2
BASE_TERMS=BSUM1
IPRED=OPRED+BASE_TERMS
ERR1=EPS(1)*(D_EPS1+D_EPSETA1_1*(ETA(1)-OETA1))
ERR2=EPS(1)*(D_EPSETA1_2*(ETA(2)-OETA2))
ESUM1=ERR1+ERR2
ERROR_TERMS=ESUM1
Y=IPRED+ERROR_TERMS
;;;FREM CODE BEGIN COMPACT
;;;DO NOT MODIFY
     SDC3 = 0.704564727537
     SDC4 = 2.23763568135
     IF (FREMTYPE.EQ.100) THEN
;       WGT  0.704564727537
        Y = THETA(1) + ETA(3)*SDC3 + EPS(2)
        IPRED = THETA(1) + ETA(3)*SDC3
     END IF
     IF (FREMTYPE.EQ.200) THEN
;       APGR  2.23763568135
        Y = THETA(2) + ETA(4)*SDC4 + EPS(2)
        IPRED = THETA(2) + ETA(4)*SDC4
     END IF
;;;FREM CODE END COMPACT
D_EPSETA1_1_ = 0
D_EPSETA1_2_ = 0
D_EPSETA1_3_ = 0
D_EPSETA1_4_ = 0
D_EPSETA2_1_ = 0
D_EPSETA2_2_ = 0
D_EPSETA2_3_ = 0
D_EPSETA2_4_ = 0
"LAST
"D_EPSETA1_1_=H(1,2)
"D_EPSETA1_2_=H(1,3)
"D_EPSETA1_3_=H(1,4)
"D_EPSETA1_4_=H(1,5)
"D_EPSETA2_1_=H(2,2)
"D_EPSETA2_2_=H(2,3)
"D_EPSETA2_3_=H(2,4)
"D_EPSETA2_4_=H(2,5)
$THETA  1.52542372881 FIX ; TV_WGT
 6.42372881356 FIX ; TV_APGR
$OMEGA  BLOCK(4)
 0.0285719
 0.000282305104644 0.0278932
 0.025270419819 -0.0014941409308 1  ;    BSV_WGT
 -0.0667752841179 0.023293667081 0.244579616563 1  ;   BSV_APGR
$SIGMA  0.013129
$SIGMA  1E-07  FIX  ;     EPSCOV
$ETAS       FILE=model_4_input.phi
$ESTIMATION MCETA=1 METHOD=COND INTERACTION MAXEVALS=9999999 SLOW
            PRINT=1 NONINFETA=1
$COVARIANCE UNCONDITIONAL
$TABLE      H011 H021 G011 G021 G031 G041 D_EPSETA1_1_ D_EPSETA1_2_
            D_EPSETA1_3_ D_EPSETA1_4_ D_EPSETA2_1_ D_EPSETA2_2_
            D_EPSETA2_3_ D_EPSETA2_4_ ID FREMTYPE NOPRINT NOAPPEND
            ONEHEADER FILE=derivatives.tab FORMAT=s1PE15.8

NM-TRAN MESSAGES
 WARNINGS AND ERRORS (IF ANY) FOR PROBLEM    1
 (WARNING  2) NM-TRAN INFERS THAT THE DATA ARE POPULATION.

1NONLINEAR MIXED EFFECTS MODEL PROGRAM (NONMEM) VERSION 7.4.3
 ORIGINALLY DEVELOPED BY STUART BEAL, LEWIS SHEINER, AND ALISON BOECKMANN
 CURRENT DEVELOPERS ARE ROBERT BAUER, ICON DEVELOPMENT SOLUTIONS,
 AND ALISON BOECKMANN. IMPLEMENTATION, EFFICIENCY, AND STANDARDIZATION
 PERFORMED BY NOUS INFOSYSTEMS.
 PROBLEM NO.:         1
 PHENOBARB SIMPLE MODEL
 TOT. NO. OF OBS RECS:      273
 TOT. NO. OF INDIVIDUALS:       59
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 #TBLN:      1
 #METH: First Order Conditional Estimation with Interaction
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
 #TERM:
0MINIMIZATION SUCCESSFUL
 NO. OF FUNCTION EVALUATIONS USED:      311
 NO. OF SIG. DIGITS IN FINAL EST.:  3.0

 ETABAR IS THE ARITHMETIC MEAN OF THE ETA-ESTIMATES,
 AND THE P-VALUE IS GIVEN FOR THE NULL HYPOTHESIS THAT THE TRUE MEAN IS 0.

 ETABAR:         7.5727E-03  1.2141E-04  2.9688E-09 -6.8369E-10
 SE:             1.9508E-02  1.8251E-02  1.2908E-01  1.2908E-01
 N:                      59          59          59          59

 P VAL.:         6.9788E-01  9.9469E-01  1.0000E+00  1.0000E+00

 ETASHRINKSD(%)  2.2623E+01  1.0692E+01  1.0000E-10  1.0000E-10
 ETASHRINKVR(%)  4.0127E+01  2.0241E+01  1.0000E-10  1.0000E-10
 EBVSHRINKSD(%)  2.3551E+01  1.1750E+01  1.0246E-05  1.0159E-06
 EBVSHRINKVR(%)  4.1556E+01  2.2120E+01  2.0493E-05  2.0317E-06
 EPSSHRINKSD(%)  2.0048E+01  9.9965E+01
 EPSSHRINKVR(%)  3.6076E+01  1.0000E+02


 TOTAL DATA POINTS NORMALLY DISTRIBUTED (N):          273
 N*LOG(2PI) CONSTANT TO OBJECTIVE FUNCTION:    501.74043912975128
 OBJECTIVE FUNCTION VALUE WITHOUT CONSTANT:    745.24289595644734
 OBJECTIVE FUNCTION VALUE WITH CONSTANT:       1246.9833350861986
 REPORTED OBJECTIVE FUNCTION DOES NOT CONTAIN CONSTANT

 TOTAL EFFECTIVE ETAS (NIND*NETA):                           236


 #TERE:
 Elapsed estimation  time in seconds:     0.79
 Elapsed covariance  time in seconds:     0.63
 Elapsed postprocess time in seconds:     0.00

 ********************               FIRST ORDER CONDITIONAL ESTIMATION WITH INTERACTION              ********************
 #OBJT:**************                       MINIMUM VALUE OF OBJECTIVE FUNCTION                      ********************
 #OBJV:********************************************      745.243       **************************************************

 ********************               FIRST ORDER CONDITIONAL ESTIMATION WITH INTERACTION              ********************
 ********************                             FINAL PARAMETER ESTIMATE                           ********************

 THETA - VECTOR OF FIXED EFFECTS PARAMETERS   *********
         TH 1      TH 2
         1.53E+00  6.42E+00

 OMEGA - COV MATRIX FOR RANDOM EFFECTS - ETAS  ********
         ETA1      ETA2      ETA3      ETA4
 ETA1
+        3.81E-02
 ETA2
+        1.36E-02  2.51E-02
 ETA3
+        1.75E-02 -8.20E-04  9.83E-01
 ETA4
+       -6.90E-02  2.81E-02  2.40E-01  9.83E-01

 SIGMA - COV MATRIX FOR RANDOM EFFECTS - EPSILONS  ****
         EPS1      EPS2
 EPS1
+        1.24E-02
 EPS2
+        0.00E+00  1.00E-07

 OMEGA - CORR MATRIX FOR RANDOM EFFECTS - ETAS  *******
         ETA1      ETA2      ETA3      ETA4
 ETA1
+        1.95E-01
 ETA2
+        4.39E-01  1.58E-01
 ETA3
+        9.04E-02 -5.22E-03  9.91E-01
 ETA4
+       -3.57E-01  1.79E-01  2.45E-01  9.91E-01

 SIGMA - CORR MATRIX FOR RANDOM EFFECTS - EPSILONS  ***
         EPS1      EPS2
 EPS1
+        1.11E-01
 EPS2
+        0.00E+00  3.16E-04

 ********************               FIRST ORDER CONDITIONAL ESTIMATION WITH INTERACTION              ********************
 ********************                            STANDARD ERROR OF ESTIMATE                          ********************

 THETA - VECTOR OF FIXED EFFECTS PARAMETERS   *********
         TH 1      TH 2
        ......... .........

 OMEGA - COV MATRIX FOR RANDOM EFFECTS - ETAS  ********
         ETA1      ETA2      ETA3      ETA4
 ETA1
+        1.61E-02
 ETA2
+        1.03E-02  6.97E-03
 ETA3
+        6.42E-02  3.17E-02  2.40E-01
 ETA4
+        5.16E-02  2.73E-02  1.65E-01  1.85E-01

 SIGMA - COV MATRIX FOR RANDOM EFFECTS - EPSILONS  ****
         EPS1      EPS2
 EPS1
+        2.33E-03
 EPS2
+       ......... .........

 OMEGA - CORR MATRIX FOR RANDOM EFFECTS - ETAS  *******
         ETA1      ETA2      ETA3      ETA4
 ETA1
+        4.12E-02
 ETA2
+        2.78E-01  2.20E-02
 ETA3
+        3.28E-01  2.02E-01  1.21E-01
 ETA4
+        2.52E-01  1.70E-01  1.60E-01  9.31E-02

 SIGMA - CORR MATRIX FOR RANDOM EFFECTS - EPSILONS  ***
         EPS1      EPS2
 EPS1
+        1.05E-02
 EPS2
+       ......... .........

 ********************               FIRST ORDER CONDITIONAL ESTIMATION WITH INTERACTION              ********************
 ********************                          COVARIANCE MATRIX OF ESTIMATE                         ********************

            TH 1      TH 2      OM11      OM12      OM13      OM14      OM22      OM23      OM24      OM33      OM34      OM44
             SG11      SG12      SG22
 TH 1
+       .........
 TH 2
+       ......... .........
 OM11
+       ......... .........  2.59E-04
 OM12
+       ......... .........  1.02E-04  1.06E-04
 OM13
+       ......... .........  7.55E-05  9.95E-05  4.13E-03
 OM14
+       ......... ......... -2.44E-04  1.84E-04  1.73E-03  2.66E-03
 OM22
+       ......... ......... -1.69E-05  9.91E-06  2.06E-04  1.40E-04  4.86E-05
 OM23
+       ......... .........  1.04E-04  1.51E-04  1.69E-04  4.58E-04  2.04E-05  1.01E-03
 OM24
+       ......... .........  1.47E-04  4.38E-05  4.88E-04  3.09E-05  5.23E-05  2.64E-04  7.44E-04
 OM33
+       ......... .........  4.52E-04  1.68E-04  4.33E-03  1.69E-04  5.86E-04  1.41E-03  1.95E-03  5.76E-02
 OM34
+       ......... .........  2.63E-06  5.34E-04 -9.18E-04  2.25E-03  1.10E-04  2.09E-03 -9.14E-04  9.12E-03  2.71E-02
 OM44
+       ......... ......... -1.03E-04 -2.10E-04  2.07E-03 -1.19E-03  2.18E-04 -9.42E-04 -9.82E-05  1.18E-02  7.99E-03  3.41E-02
 SG11
+       ......... .........  1.03E-06 -5.64E-06 -4.59E-05 -3.69E-05 -2.16E-06 -6.42E-06 -1.36E-05 -3.96E-05  7.43E-06  2.72E-05
          5.45E-06
 SG12
+       ......... ......... ......... ......... ......... ......... ......... ......... ......... ......... ......... .........
         ......... .........
 SG22
+       ......... ......... ......... ......... ......... ......... ......... ......... ......... ......... ......... .........
         ......... ......... .........

 ********************               FIRST ORDER CONDITIONAL ESTIMATION WITH INTERACTION              ********************
 ********************                          CORRELATION MATRIX OF ESTIMATE                        ********************

            TH 1      TH 2      OM11      OM12      OM13      OM14      OM22      OM23      OM24      OM33      OM34      OM44
             SG11      SG12      SG22
 TH 1
+       .........
 TH 2
+       ......... .........
 OM11
+       ......... .........  1.61E-02
 OM12
+       ......... .........  6.19E-01  1.03E-02
 OM13
+       ......... .........  7.30E-02  1.51E-01  6.42E-02
 OM14
+       ......... ......... -2.93E-01  3.46E-01  5.21E-01  5.16E-02
 OM22
+       ......... ......... -1.50E-01  1.38E-01  4.61E-01  3.88E-01  6.97E-03
 OM23
+       ......... .........  2.03E-01  4.64E-01  8.30E-02  2.80E-01  9.23E-02  3.17E-02
 OM24
+       ......... .........  3.35E-01  1.56E-01  2.78E-01  2.20E-02  2.75E-01  3.05E-01  2.73E-02
 OM33
+       ......... .........  1.17E-01  6.82E-02  2.81E-01  1.37E-02  3.50E-01  1.86E-01  2.97E-01  2.40E-01
 OM34
+       ......... .........  9.93E-04  3.16E-01 -8.68E-02  2.65E-01  9.56E-02  4.01E-01 -2.04E-01  2.31E-01  1.65E-01
 OM44
+       ......... ......... -3.47E-02 -1.11E-01  1.74E-01 -1.25E-01  1.69E-01 -1.61E-01 -1.95E-02  2.65E-01  2.63E-01  1.85E-01
 SG11
+       ......... .........  2.75E-02 -2.35E-01 -3.06E-01 -3.06E-01 -1.33E-01 -8.67E-02 -2.14E-01 -7.07E-02  1.94E-02  6.32E-02
          2.33E-03
 SG12
+       ......... ......... ......... ......... ......... ......... ......... ......... ......... ......... ......... .........
         ......... .........
 SG22
+       ......... ......... ......... ......... ......... ......... ......... ......... ......... ......... ......... .........
         ......... ......... .........
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 Elapsed finaloutput time in seconds:     0.01
 #CPUT: Total CPU Time in Seconds,        1.449
