fre 25 maj 2018 09:17:25 CEST
$PROBLEM    WARFARIN PKPD
;O'Reilly RA, Aggeler PM. Studies on coumarin anticoagulant drugs

;Initiation of warfarin therapy without a loading dose.

;Circulation 1968;38:169-177

;

;O'Reilly RA, Aggeler PM, Leong LS. Studies of the coumarin anticoagulant

;drugs: The pharmacodynamics of warfarin in man.

;Journal of Clinical Investigation 1963;42(10):1542-1551
$DATA      warfarin-sim IGNORE=@
$INPUT      ID WT AGE SEX TIME AMT RATX DVID DV MDV EVID
$THETA  (0.01,0.134,1) ; POPCL L/h/70kg
 (0.01,8.09,20) ; POPV L/70kg
 (0.01,0.6,24) ; POPKA h
 (0.01,96.5,200) ; POPE0
 (-1000000,-74.3,0) ; POPEMAX
 (0.01,0.219,100) ; POPC50
$OMEGA  0.09  ;      PPVCL
 0.09  ;       PPVV
 0.9  ;      PPVKA
 0.001  ;      PPVE0
 0.01  ;    PPVEMAX
 0.5  ;     PPVC50
$SIGMA  0.00697  ;      RUVCV
$SIGMA  0.0824  ; RUVSD mg/L
$SIGMA  30  ;      RUVFX
$SUBROUTINE ADVAN2 TRAN2
$PK

   IF (NEWIND.LE.1) LN2=LOG(2)

   FSZV=WT/70
   FSZCL=FSZV**0.75

   CL=FSZCL*THETA(1)*EXP(ETA(1))
   V=FSZV*THETA(2)*EXP(ETA(2))
    KA=THETA(3)*EXP(ETA(3))
;   TLAG=THETA(4)*EXP(ETA(4))

   S2=V

   E0=THETA(4)*EXP(ETA(4))
   EMAX=THETA(5)*EXP(ETA(5))
   C50=(1-SEX*0.5)*THETA(6)*EXP(ETA(6))

   DLTA=E0+EMAX
;   IF (DLTA.LT.0) EXIT 1 101

$ERROR

   CP=F
   PCA=E0 + EMAX*CP/(C50+CP)
   IF (DVID.LE.1) THEN
    IPRED = CP
      Y=CP*(1+ERR(1)) + ERR(2)
   ENDIF
   IF (DVID.EQ.2) THEN
   IPRED = PCA
      Y=PCA + ERR(3)
   ENDIF

;Simulation code continues here
;$SIM (12345) NSUB = 1
$ESTIMATION METHOD=COND INTERACTION PRINT=1 NOABORT MCETA=100
$TABLE      ID TIME WT AGE SEX AMT RATX DVID DV MDV EVID NOAPPEND
            ONEHEADER NOPRINT FILE=sdtab

NM-TRAN MESSAGES
 WARNINGS AND ERRORS (IF ANY) FOR PROBLEM    1
 (WARNING  2) NM-TRAN INFERS THAT THE DATA ARE POPULATION.
 (WARNING  3) THERE MAY BE AN ERROR IN THE ABBREVIATED CODE. THE FOLLOWING
 ONE OR MORE RANDOM VARIABLES ARE DEFINED WITH "IF" STATEMENTS THAT DO NOT
 PROVIDE DEFINITIONS FOR BOTH THE "THEN" AND "ELSE" CASES. IF ALL
 CONDITIONS FAIL, THE VALUES OF THESE VARIABLES WILL BE ZERO.
   IPRED Y
Note: The following floating-point exceptions are signalling: IEEE_INVALID_FLAG IEEE_DIVIDE_BY_ZERO

1NONLINEAR MIXED EFFECTS MODEL PROGRAM (NONMEM) VERSION 7.3.0
 ORIGINALLY DEVELOPED BY STUART BEAL, LEWIS SHEINER, AND ALISON BOECKMANN
 CURRENT DEVELOPERS ARE ROBERT BAUER, ICON DEVELOPMENT SOLUTIONS,
 AND ALISON BOECKMANN. IMPLEMENTATION, EFFICIENCY, AND STANDARDIZATION
 PERFORMED BY NOUS INFOSYSTEMS.
 PROBLEM NO.:         1
 WARFARIN PKPD
 TOT. NO. OF OBS RECS:     1449
 TOT. NO. OF INDIVIDUALS:     96
 ONE COMPARTMENT MODEL WITH FIRST-ORDER ABSORPTION (ADVAN2)
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 #TBLN:      1
 #METH: First Order Conditional Estimation with Interaction
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
 #TERM:
0MINIMIZATION SUCCESSFUL
 NO. OF FUNCTION EVALUATIONS USED:      316
 NO. OF SIG. DIGITS IN FINAL EST.:  3.6

 ETABAR IS THE ARITHMETIC MEAN OF THE ETA-ESTIMATES,
 AND THE P-VALUE IS GIVEN FOR THE NULL HYPOTHESIS THAT THE TRUE MEAN IS 0.

 ETABAR:         1.8160E-03 -6.2457E-03 -3.1159E-02  7.4303E-04  5.5882E-03  6.3430E-02
 SE:             2.7051E-02  3.1590E-02  5.1965E-02  2.3599E-03  7.6140E-03  4.9608E-02
 N:                      96          96          96          96          96          96

 P VAL.:         9.4648E-01  8.4327E-01  5.4877E-01  7.5287E-01  4.6298E-01  2.0103E-01

 ETAshrink(%):   2.2935E+00  3.0848E+00  4.1952E+01  3.7142E+01  1.6543E+01  3.2347E+01
 EBVshrink(%):   2.1726E+00  3.1103E+00  4.0601E+01  3.7211E+01  1.6890E+01  3.4259E+01
 EPSshrink(%):   1.4857E+01  1.4857E+01  1.1594E+01

 #TERE:
 Elapsed estimation time in seconds:    36.16

 ********************               FIRST ORDER CONDITIONAL ESTIMATION WITH INTERACTION              ********************
 #OBJT:**************                       MINIMUM VALUE OF OBJECTIVE FUNCTION                      ********************
 #OBJV:********************************************     3968.651       **************************************************

 ********************               FIRST ORDER CONDITIONAL ESTIMATION WITH INTERACTION              ********************
 ********************                             FINAL PARAMETER ESTIMATE                           ********************

 THETA - VECTOR OF FIXED EFFECTS PARAMETERS   *********
         TH 1      TH 2      TH 3      TH 4      TH 5      TH 6
         1.38E-01  8.14E+00  7.07E-01  9.68E+01 -7.52E+01  2.49E-01

 OMEGA - COV MATRIX FOR RANDOM EFFECTS - ETAS  ********
            ETA1      ETA2      ETA3      ETA4      ETA5      ETA6
 ETA1
+        7.44E-02
 ETA2
+        0.00E+00  1.03E-01
 ETA3
+        0.00E+00  0.00E+00  7.77E-01
 ETA4
+        0.00E+00  0.00E+00  0.00E+00  1.37E-03
 ETA5
+        0.00E+00  0.00E+00  0.00E+00  0.00E+00  8.07E-03
 ETA6
+        0.00E+00  0.00E+00  0.00E+00  0.00E+00  0.00E+00  5.22E-01

 SIGMA - COV MATRIX FOR RANDOM EFFECTS - EPSILONS  ****
            EPS1      EPS2      EPS3
 EPS1
+        7.31E-03
 EPS2
+        0.00E+00  6.29E-02
 EPS3
+        0.00E+00  0.00E+00  2.89E+01

 OMEGA - CORR MATRIX FOR RANDOM EFFECTS - ETAS  *******
            ETA1      ETA2      ETA3      ETA4      ETA5      ETA6
 ETA1
+        2.73E-01
 ETA2
+        0.00E+00  3.21E-01
 ETA3
+        0.00E+00  0.00E+00  8.82E-01
 ETA4
+        0.00E+00  0.00E+00  0.00E+00  3.70E-02
 ETA5
+        0.00E+00  0.00E+00  0.00E+00  0.00E+00  8.99E-02
 ETA6
+        0.00E+00  0.00E+00  0.00E+00  0.00E+00  0.00E+00  7.22E-01

 SIGMA - CORR MATRIX FOR RANDOM EFFECTS - EPSILONS  ***
            EPS1      EPS2      EPS3
 EPS1
+        8.55E-02
 EPS2
+        0.00E+00  2.51E-01
 EPS3
+        0.00E+00  0.00E+00  5.38E+00
 #CPUT: Total CPU Time in Seconds,       36.516
